*Heading
** Job name: H_Final Model name: Partion_MM
*Preprint, echo=NO, model=NO, history=NO, contact=NO
**
** PARTS
**
*Part, name=Part
*Node
      1,           0.,  0.104999997, 0.00100000005
      2,           0.,           0., 0.00100000005
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*Element, type=Q3D8R
  1, 110, 111, 356, 335, 486, 487, 796, 775
  2, 358, 311, 312, 368, 798, 751, 752, 808
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*Nset, nset=Set-1
   1,   2,   3,   4,   5,   6
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*Elset, elset=Set-1, generate
   1,  405,    1
*Nset, nset=Set-2
   1,   2,   3,   4,   5,   6
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*Elset, elset=Set-2, generate
 406,  540,    1
** Section: IPS
*Solid Section, elset=Set-1, material=IPS_MM
,
** Section: NI
*Solid Section, elset=Set-2, material=Nikkel_MM
,
*End Part
**
**
** ASSEMBLY
**
*Assembly, name=Assembly
**
*Instance, name=Part-1, part=Part
*End Instance
**
*Nset, nset=NODE_L, instance=Part-1
   2,   3,  17,  18,  45,  46, 217, 218
*Nset, nset=NODE_R, instance=Part-1
   6,   7,  22,  83,  84, 267, 268
*Nset, nset=Set-1, instance=Part-1
   2,   3,   6,   7,  10,  11
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*Elset, elset=Set-1, instance=Part-1
  21,  22,  23,  53,  54,  55
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*Nset, nset=Set-2, instance=Part-1
   6,   7,  21,  22,  83,  84, 267, 268
*Elset, elset=Set-2, instance=Part-1, generate
 458,  460,    1
*Nset, nset=Set-3, instance=Part-1
   2,   3,   6,   7,  10,  11
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*Elset, elset=Set-3, instance=Part-1
  21,  22,  23,  53,  54,  55
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*Nset, nset=Set-4, instance=Part-1
  2,  3, 17, 18
*Nset, nset=Set-8, instance=Part-1
   6,   7,  21,  22,  83,  84, 267, 268
*Elset, elset=Set-8, instance=Part-1, generate
 458,  460,    1
*Nset, nset=Set-9, instance=Part-1
   6,   7,  14,  15,  21,  22
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*Elset, elset=Set-9, instance=Part-1
  53,  54,  55, 188, 189, 190, 323, 324, 325, 458, 459, 460
*Nset, nset=Set-10, instance=Part-1
   2,   3,  10,  11,  17,  18
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*Elset, elset=Set-10, instance=Part-1
  21,  22,  23, 156, 157, 158, 291, 292, 293, 426, 427, 428
*Elset, elset=_Surf-1_S4, internal, instance=Part-1
 408, 409, 413, 420, 421, 423
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*Elset, elset=_Surf-1_S6, internal, instance=Part-1
 406, 411, 418, 428, 433, 436
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*Elset, elset=_Surf-1_S3, internal, instance=Part-1
 425, 438, 452, 454, 475, 481, 486, 502, 509, 510
*Elset, elset=_Surf-1_S5, internal, instance=Part-1
 414, 416, 435, 464, 466, 477, 484, 485, 488, 491, 492, 503, 508, 514, 519, 532
*Elset, elset=_Surf-1_S2, internal, instance=Part-1, generate
 406,  540,    1
*Surface, type=ELEMENT, name=Surf-1
_Surf-1_S4, S4
_Surf-1_S6, S6
_Surf-1_S2, S2
_Surf-1_S3, S3
_Surf-1_S5, S5
*Elset, elset=_Surf-2_S5, internal, instance=Part-1
   3,   4,   8,  15,  16,  18
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*Elset, elset=_Surf-2_S6, internal, instance=Part-1
  20,  33,  47,  49,  70,  76
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*Elset, elset=_Surf-2_S4, internal, instance=Part-1
   9,  11,  30,  59,  61,  72
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*Elset, elset=_Surf-2_S3, internal, instance=Part-1
   1,   6,  13,  23,  28,  31
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*Elset, elset=_Surf-2_S2, internal, instance=Part-1, generate
 271,  405,    1
*Surface, type=ELEMENT, name=Surf-2
_Surf-2_S5, S5
_Surf-2_S6, S6
_Surf-2_S4, S4
_Surf-2_S2, S2
_Surf-2_S3, S3
*Elset, elset=_Surf-3_S3, internal, instance=Part-1
 426, 428
*Elset, elset=_Surf-3_S5, internal, instance=Part-1
 427,
*Surface, type=ELEMENT, name=Surf-3
_Surf-3_S3, S3
_Surf-3_S5, S5
*End Assembly
**
** MATERIALS
**
*Material, name=IPS_MM
*Conductivity
 0.003,
*Density
 1.111e-06,
*Elastic
4000., 0.3
*Electrical Conductivity
1.,
*Expansion
 5.2e-05,
*Joule Heat Fraction
          1.,
*Specific Heat
1500.,
*Material, name=Nikkel_MM
*Conductivity
 0.0086,
*Density
 6.5e-06,
*Dielectric
1.,
*Elastic
106010., 0.33
*Electrical Conductivity
1320.,
*Expansion
 7.6e-06,
*Joule Heat Fraction
          1.,
*Specific Heat
3700.,
**
** INTERACTION PROPERTIES
**
*Film Property, name=Constant
2e-05
*Film Property, name=DL_IPS
5e-06
*Film Property, name=DL_Ni
7.1e-06, 25.
1e-05, 40.
1.19e-05, 60.
1.32e-05, 80.
1.42e-05, 100.
**
** PHYSICAL CONSTANTS
**
*Physical Constants, absolute zero=-273.15, stefan boltzmann=5.669e-08
** ----------------------------------------------------------------
**
** STEP: Step-1
**
*Step, name=Step-1, nlgeom=NO
*Static
0.01, 1., 1e-05, 1.
**
** BOUNDARY CONDITIONS
**
** Name: BC-1 Type: Symmetry/Antisymmetry/Encastre
*Boundary
Set-1, ENCASTRE
**
** LOADS
**
** Name: Load-1   Type: Gravity
*Dload
, GRAV, 9810., 0., 0., -1.
**
** OUTPUT REQUESTS
**
*Restart, write, frequency=0
**
** FIELD OUTPUT: F-Output-1
**
*Output, field, variable=PRESELECT
**
** HISTORY OUTPUT: H-Output-1
**
*Output, history, variable=PRESELECT
*End Step
** ----------------------------------------------------------------
**
** STEP: Step-2
**
*Step, name=Step-2, nlgeom=NO, inc=3000
*Coupled Temperature-displacement, electrical, creep=none, deltmx=1.
0.001, 0.6, 5e-08, 0.6
**
** BOUNDARY CONDITIONS
**
** Name: BC-2 Type: Electric potential
*Boundary
NODE_R, 9, 9
** Name: BC-3 Type: Temperature
*Boundary
Set-9, 11, 11, 20.
** Name: BC-5 Type: Temperature
*Boundary
Set-10, 11, 11, 20.
**
** LOADS
**
** Name: Load-3   Type: Concentrated current
*Cecurrent
NODE_L, ,0.001875
**
** INTERACTIONS
**
** Interaction: DL_NI
*Sfilm
Surf-1, F, 20., Constant
** Interaction: IPS
*Sfilm
Surf-2, F, 20., Constant
**
** OUTPUT REQUESTS
**
*Restart, write, frequency=0
**
** FIELD OUTPUT: F-Output-2
**
*Output, field
*Node Output
EPOT, NT, U
*Element Output, directions=YES
EPG, HFL, S
**
** FIELD OUTPUT: F-Output-1
**
*Output, field, variable=PRESELECT
**
** HISTORY OUTPUT: H-Output-1
**
*Output, history, variable=PRESELECT
*End Step
