*Heading
** Job name: Mode4 Model name: teaf-steadystate-refined
*Preprint, echo=NO, model=NO, history=NO, contact=NO
**
** PARTS
**
*Part, name=PART-1-1
*Node
      1,   1.33196402,   21.7602196,  0.379999995
      2,  0.579902828,   22.6055298,  0.379999995
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*Element, type=DC3D8E
   1,  270,  271, 2044, 2041, 2113, 2114, 6034, 6031
   2,  271,  272, 2045, 2044, 2114, 2115, 6035, 6034
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*Elset, elset=_PICKEDSET19, internal, generate
    1,  5580,     1
** Section: Section-1-_PICKEDSET19
*Solid Section, elset=_PICKEDSET19, material=ZINC
1.,
*End Part
**
**
** ASSEMBLY
**
*Assembly, name=Assembly
**
*Instance, name=PART-1-1, part=PART-1-1
*End Instance
**
*Nset, nset=MEAS-PTS, instance=PART-1-1
  13,  15,  24,  59, 106, 113, 128, 137, 161, 174, 179, 220
*Nset, nset=NLHS, instance=PART-1-1
   45,   46,   47,   48,   68,   69
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*Elset, elset=NLHS, instance=PART-1-1
  339,  340,  341,  342,  343,  344
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*Elset, elset=_LHS_S1, internal, instance=PART-1-1
 339, 340, 341, 342, 343, 344
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*Elset, elset=_LHS_S5, internal, instance=PART-1-1
 2159, 2160, 2161, 2162, 2163, 2164, 2189, 2190, 2191, 2192, 2193, 2194
*Elset, elset=_LHS_S6, internal, instance=PART-1-1, generate
 1785,  1830,     5
*Nset, nset=_PICKEDSET33, internal, instance=PART-1-1
   23,   24,   25,   26,   74,   75
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*Elset, elset=_PICKEDSET33, internal, instance=PART-1-1
  241,  242,  243,  244,  245,  246
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*Nset, nset=_PICKEDSET34, internal, instance=PART-1-1
   45,   46,   47,   48,   68,   69
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*Elset, elset=_PICKEDSET34, internal, instance=PART-1-1
  339,  340,  341,  342,  343,  344
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*Nset, nset=_PICKEDSET35, internal, instance=PART-1-1
   23,   24,   25,   26,   74,   75
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*Elset, elset=_LHS_S5_1, internal, instance=PART-1-1
 2159, 2160, 2161, 2162, 2163, 2164, 2189, 2190, 2191, 2192, 2193, 2194
*Elset, elset=_LHS_S6_1, internal, instance=PART-1-1, generate
 1785,  1830,     5
*Elset, elset=_LHS_S1_1, internal, instance=PART-1-1
 339, 340, 341, 342, 343, 344
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*Surface, type=ELEMENT, name=LHS
_LHS_S5_1, S5
_LHS_S6_1, S6
_LHS_S1_1, S1
*Elset, elset=__PICKEDSURF37_S5_1, internal, instance=PART-1-1
  199,  200,  201,  202,  203,  204
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*Elset, elset=__PICKEDSURF37_S2_1, internal, instance=PART-1-1
 1375, 1376, 1377, 1378, 1379, 1380
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*Elset, elset=__PICKEDSURF37_S1_1, internal, instance=PART-1-1
 1810, 1811, 1812, 1813, 1814, 1815
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*Surface, type=ELEMENT, name=_PICKEDSURF37, internal
__PICKEDSURF37_S5_1, S5
__PICKEDSURF37_S2_1, S2
__PICKEDSURF37_S1_1, S1
*Elset, elset=__PICKEDSURF38_S2_1, internal, instance=PART-1-1
   49,   50,   51,   52,   53,   54
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*Elset, elset=__PICKEDSURF38_S5_1, internal, instance=PART-1-1
  258,  259,  260,  261,  262,  268
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*Elset, elset=__PICKEDSURF38_S4_1, internal, instance=PART-1-1
  287,  288,  289,  290,  291,  292,  293, 2246, 2254, 2255, 2256, 2257, 2258, 2259, 2260
*Elset, elset=__PICKEDSURF38_S3_1, internal, instance=PART-1-1
  294,  295,  296,  297,  298,  299,  300,  302, 2247, 2248, 2249, 2250, 2251, 2252, 2253
*Surface, type=ELEMENT, name=_PICKEDSURF38, internal
__PICKEDSURF38_S2_1, S2
__PICKEDSURF38_S5_1, S5
__PICKEDSURF38_S4_1, S4
__PICKEDSURF38_S3_1, S3
*End Assembly
**
** MATERIALS
**
*Material, name=ZINC
*Conductivity
 0.1121, 20.
 0.1103,100.
*Electrical Conductivity
16750., 20.
12920.,100.
*Joule Heat Fraction
          1.,
**
** INTERACTION PROPERTIES
**
*Film Property, name=BLADES-PROP
5.42e-06, 25.
9.6e-06, 40.
1.17e-05, 60.
1.3e-05, 80.
1.41e-05, 100.
*Film Property, name=ELEMENT-PROP
6.57e-06, 25.
1.16e-05, 40.
1.42e-05, 60.
1.58e-05, 80.
1.7e-05, 100.
** ----------------------------------------------------------------
**
** STEP: Step-1
**
*Step, name=Step-1, nlgeom=NO
*Coupled Thermal-electrical, steady state, deltmx=0.
1., 1., 1e-05, 1.,
**
** BOUNDARY CONDITIONS
**
** Name: Elec-BC-1 Type: Electric potential
*Boundary
_PICKEDSET33, 9, 9
** Name: Temp-BC-1 Type: Temperature
*Boundary
_PICKEDSET34, 11, 11, 29.4
** Name: Temp-BC-2 Type: Temperature
*Boundary
_PICKEDSET35, 11, 11, 30.2
**
** LOADS
**
** Name: SURFCURR-1   Type: Surface current
*Dsecurrent
LHS,CS,6.
**
** INTERACTIONS
**
** Interaction: SURFFILM-1
*Sfilm
_PICKEDSURF37, F, 23.3, BLADES-PROP
** Interaction: SURFFILM-2
*Sfilm
_PICKEDSURF38, F, 23.3, ELEMENT-PROP
**
** OUTPUT REQUESTS
**
*Restart, write, frequency=1
**
** FIELD OUTPUT: F-Output-3
**
*Output, field, frequency=100
*Element Output, directions=YES
ECD,
*Contact Output
ECD,
**
** FIELD OUTPUT: F-Output-2
**
*Element Output, directions=YES
ECD, EPG, HFL
*Contact Output
ECD,
**
** FIELD OUTPUT: F-Output-1
**
*Node Output
EPOT, NT
**
** HISTORY OUTPUT: H-Output-1
**
*Output, history, variable=PRESELECT
*End Step
** ----------------------------------------------------------------
**
** STEP: Step-2
**
*Step, name=Step-2, nlgeom=NO
*Heat Transfer, steady state, deltmx=0.
1., 1., 1e-05, 1.,
**
** OUTPUT REQUESTS
**
*Restart, write, frequency=1
**
** FIELD OUTPUT: F-Output-5
**
*Output, field, frequency=100
*Element Output, directions=YES
HFL,
**
** FIELD OUTPUT: F-Output-4
**
*Node Output
NT,
*Output, history, frequency=0
*End Step
